// SBML level 3 version 1
// This model was downloaded from BioModels Database
// http://www.ebi.ac.uk/biomodels-static/
// dcterms:bibliographicCitation: Reciprocal regulation of ARPP-16 by PKA and MAST3 kinases provides a cAMP-regulated switch in protein phosphatase 2A inhibition urn:miriam:doi:10.7554/eLife.24998

model Switching_behaviour_of_PP2A_inhibition_by_ARPP_16___mutual_inhibitions_and_PKA_inhibits_MAST3_and_dominant_negative_effect()
  // Musante2017 - Switching behaviour of PP2A inhibition by ARPP-16 - mutual inhibitions and PKA inhibits MAST3 and dominant negative effect
  // Musante2017 - Switching behaviour of PP2Ainhibition by ARPP-16 - mutual inhibitions and PKA inhibits MAST3and dominant negative effect
  // This model is described in the article:
  // Reciprocal regulation of ARPP-16 by PKA and MAST3 kinases provides a cAMP-regulated switch in protein phosphatase 2A inhibition.
  // Musante V, Li L, Kanyo J, Lam TT, Colangelo CM, Cheng SK, Brody AH, Greengard P, Le Novère N, Nairn AC.
  // Elife 2017 Jun; 6:
  // Abstract:
  // ARPP-16, ARPP-19, and ENSA are inhibitors of protein phosphatase PP2A. ARPP-19 and ENSA phosphorylated by Greatwall kinase inhibit PP2A during mitosis. ARPP-16 is expressed in striatal neurons where basal phosphorylation by MAST3 kinase inhibits PP2A and regulates key components of striatal signaling. The ARPP-16/19 proteins were discovered as substrates for PKA, but the function of PKA phosphorylation is unknown. We find that phosphorylation by PKA or MAST3 mutually suppresses the ability of the other kinase to act on ARPP-16. Phosphorylation by PKA also acts to prevent inhibition of PP2A by ARPP-16 phosphorylated by MAST3. Moreover, PKA phosphorylates MAST3 at multiple sites resulting in its inhibition. Mathematical modeling highlights the role of these three regulatory interactions to create a switch-like response to cAMP. Together, the results suggest a complex antagonistic interplay between the control of ARPP-16 by MAST3 and PKA that creates a mechanism whereby cAMP mediates PP2A disinhibition.
  // This model is hosted on BioModels Database and identified by: BIOMD0000000645.
  // To cite BioModels Database, please use: BioModels Database: An enhanced, curated and annotated resource for published quantitative kinetic models.
  // To the extent possible under law, all copyright and related or neighbouring rights to this encoded model have been dedicated to the public domain worldwide. Please refer to CC0 Public Domain Dedication for more information.
  // biomodels.db:MODEL1707020002
  // biomodels.db:BIOMD0000000645
  // isDescribedBy pubmed:28613156
  // isDerivedFrom BTO:0002181
  // hasProperty mamo:MAMO_0000046
  // hasTaxon taxonomy:10095
  // model units - substance: substance, time: time, volume: volume, area: area, length: length, extent: substance

  // Compartments:
  compartment compartment = 1 volume;

  // Species:
  species $A46 in compartment = 9.8;  // isVersionOf pr:PR_P56212-2
  species $A88 in compartment = ARPPtot - A46;  // isVersionOf pr:PR_P56212-2
  species $M in compartment = 0;  // isVersionOf uniprot:Q3U214
  species $PKA in compartment = 0;  // isVersionOf uniprot:P05132
  species $BB in compartment;  // hasPart pr:PR_P56212-2
  species $Complex in compartment;  // isVersionOf GO:0000159

  // Parameters:
  ARPPtot = 10;
  PP2Atot = 2;
  MASTtot = 2.7;
  PKActot = 12;
  kass = 3.3;
  kdiss = 0.0033;
  kcatpp2a = 0.05;  // isDescribedBy pubmed:25683003
  kcatmast = 0.0988;  // isDescribedBy pubmed:28613156
  kmmast = 0.09;
  kcatpka = 0.935;  // isDescribedBy pubmed:28613156
  kmpka = 1.6;  // isDescribedBy pubmed:28613156
  kcatpp1 = 0.5;
  pp1 = 5;
  kmpp1 = 1;
  k88 = 0.01865;
  kcamp = 0.7;  // isDescribedBy pubmed:14625280
  n = 2;  // isDescribedBy pubmed:14625280
  KA = 10;  // isDescribedBy pubmed:14625280
  k46 = 0.02335;
  cAMP = 0;
  a = 0.37526;
  kpka = 0.097;
  b = 2.36;
  r = 1.2;
  v = 100;
  kppx = 0.05;
  Initial_for_ARPPtot = ARPPtot;
  Initial_for_KA = KA;
  Initial_for_MASTtot = MASTtot;
  Initial_for_PKActot = PKActot;
  Initial_for_PP2Atot = PP2Atot;
  Initial_for_a = a;
  Initial_for_b = b;
  Initial_for_cAMP = cAMP;
  Initial_for_k46 = k46;
  Initial_for_k88 = k88;
  Initial_for_kass = kass;
  Initial_for_kcamp = kcamp;
  Initial_for_kcatmast = kcatmast;
  Initial_for_kcatpka = kcatpka;
  Initial_for_kcatpp1 = kcatpp1;
  Initial_for_kcatpp2a = kcatpp2a;
  Initial_for_kdiss = kdiss;
  Initial_for_kmmast = kmmast;
  Initial_for_kmpka = kmpka;
  Initial_for_kmpp1 = kmpp1;
  Initial_for_kppx = kppx;
  Initial_for_n = n;
  Initial_for_pp1 = pp1;
  Initial_for_r = r;

  // Assignment rules:
  kmpp2a := (Initial_for_kdiss + Initial_for_kcatpp2a)*(1 + v*A88/Initial_for_ARPPtot)/Initial_for_kass;
  BB := A46 + Initial_for_PP2Atot + kmpp2a;
  Complex := (BB - sqrt(BB^2 - 4*A46*Initial_for_PP2Atot))/2;
  A46bar := A46/Initial_for_ARPPtot;

  // Rate rules:
  A46' = Initial_for_kcatmast*M*(ARPPtot - A46)/(Initial_for_kmmast + Initial_for_a*A88/Initial_for_ARPPtot + Initial_for_r*(Initial_for_MASTtot - M)/Initial_for_MASTtot + (ARPPtot - A46)) - Initial_for_kcatpp2a*Complex;
  A88' = Initial_for_kcatpka*PKA*(ARPPtot - A88)/(Initial_for_kmpka + Initial_for_b*A46/Initial_for_ARPPtot + ARPPtot - A88) - Initial_for_kcatpp1*Initial_for_pp1*A88/(Initial_for_kmpp1 + A88);
  M' = Initial_for_kppx*(Initial_for_MASTtot - M) - Initial_for_k88*A88*M - kpka*PKA*M;
  PKA' = Initial_for_kcamp*(Initial_for_PKActot - PKA)*Initial_for_cAMP^Initial_for_n/(Initial_for_KA^Initial_for_n + Initial_for_cAMP^Initial_for_n) - Initial_for_k46*A46*PKA;

  // Unit definitions:
  unit length = metre;
  unit area = metre^2;
  unit volume = litre;
  unit time = second;
  unit substance = 1e-6 mole;
end
